*Heading
** Job name: Job-3 Model name: Square
** Generated by: Abaqus/CAE 6.12-1
*Preprint, echo=NO, model=NO, history=NO, contact=NO
**
** PARTS
**
*Part, name=Part-1
*Node
      1,  0.709999979,  0.115000002
      2,  0.289999992,  0.254999995
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*Element, type=CPS3
 1, 1279,  929,  781
 2, 1325, 1346, 1062
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*Element, type=CPS4R
 11,   32,   33,  779,  856
 12,  780,  779,   33,   34
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*Nset, nset=_PickedSet18, internal
     1,     2,     3,     8,     9,    10
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*Elset, elset=_PickedSet18, internal
     1,     2,     3,     4,     5,     6
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*Nset, nset=_PickedSet19, internal
     1,     2,     3,     4,     5,     6
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*Elset, elset=_PickedSet19, internal, generate
  2156,  10724,      1
*Nset, nset=Circ
     1,     2,     3,     8,     9,    10
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*Elset, elset=Circ
     1,     2,     3,     4,     5,     6
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*Nset, nset=matrix
     1,     2,     3,     4,     5,     6
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*Elset, elset=matrix, generate
  2156,  10724,      1
*Nset, nset=edges
   4,   5,   6,   7, 247, 248
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*Elset, elset=edges
 2414, 2460, 2461, 2463, 2484, 2486
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** Section: hard
*Solid Section, elset=_PickedSet18, material=hard
1.,
** Section: soft
*Solid Section, elset=_PickedSet19, material=Material-2
1.,
*End Part
**
**
** ASSEMBLY
**
*Assembly, name=Assembly
**
*Instance, name=Part-1-1, part=Part-1
*End Instance
**
*Nset, nset=_PickedSet4, internal, instance=Part-1-1
     1,     2,     3,     4,     5,     6
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*Elset, elset=_PickedSet4, internal, instance=Part-1-1, generate
  2156,  10724,      1
*End Assembly
**
** MATERIALS
**
*Material, name=Material-2
*Elastic
 1e+10, 0.3
*Material, name=hard
*Elastic
 1e+11, 0.45
** ----------------------------------------------------------------
**
** STEP: Step-1
**
*Step, name=Step-1
*Static
1., 1., 1e-05, 1.
**
** BOUNDARY CONDITIONS
**
** Name: BC-1 Type: Displacement/Rotation
*Boundary
_PickedSet4, 2, 2
**
** OUTPUT REQUESTS
**
*Restart, write, frequency=0
**
** FIELD OUTPUT: F-Output-1
**
*Output, field, variable=PRESELECT
**
** HISTORY OUTPUT: H-Output-1
**
*Output, history, variable=PRESELECT
*End Step
